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/batch
! ANSYS input file written by Workbench version 2020 R1
! File used for geometry attach: D:\Ansys\Topology Optimisation of Triangular Bracket_files\dp0\SYS-2\DM\SYS-2.scdoc
/title,Topology Optimisation of Triangular Bracket--Static Structural (C5)
/com,--- Data in consistent NMM units. See Solving Units in the help system for more information.
/units,MPA
/prep7
! Turn off shape checking because checks already performed inside WB mesher.
! See help system for more information.
SHPP,OFF,,NOWARN
etcon,set             ! allow ANSYS to choose best KEYOP's for 180x elements
/com,*********** Nodes for the whole assembly ***********
nblock,3,,8730
(1i9,3e20.9e3)
        1     6.213536201E+00     1.758650530E+00    -6.666666667E-01
        2     5.572292498E+00     2.195100723E+00    -6.666666667E-01
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-1
/com,*********** Elements for Body 1 "SYS-2\Solid" ***********
et,1,186
keyo,1,2,1          ! set full integration on SOLID186
eblock,19,solid,,1332
(19i9)
        1        1        1        1        0        0        0        0       20        0        1      229     2212     2213      311      711     2233     2234      629
     3282     7904     3586     3279     4911     7935     4651     4648     3281     7906     7909     3584
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-1
/com,*********** Send User Defined Coordinate System(s) ***********
csys,0
toffst,273.15,  ! Temperature offset from absolute zero
/com,*********** Set Reference Temperature ***********
tref,22.
/com,*********** Send Materials ***********
Temperature = 'TEMP' ! Temperature
MP,DENS,1,7.85e-09,	! tonne mm^-3
MP,ALPX,1,1.2e-05,	! C^-1
MP,C,1,434000000,	! mm^2 s^-2 C^-1
MP,KXX,1,60.5,	! tonne mm s^-3 C^-1
MP,RSVX,1,0.00017,	! ohm mm
MP,EX,1,200000,	! tonne s^-2 mm^-1
MP,NUXY,1,0.3,
MP,MURX,1,10000,

!************************* Model Summary ********************
!SYS-2\Solid,	Structural Steel,	matid,	1
!************************* End Model Summary ********************
/com,*********** Fixed Supports ***********
CMBLOCK,_FIXEDSU,NODE,      220
(8i10)
      1253      1254      1255      1256      1257      1258      1259      1260
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cmsel,s,_FIXEDSU
d,all,all
nsel,all
/com,********* Frictionless Supports X *********
CMBLOCK,_FRICSUX,NODE,      260
(8i10)
      1316      1317      1318      1319      1320      1321      1322      1323
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cmsel,s,_FRICSUX
d,all,ux,0
nsel,all
/com,*********** Node Rotations ***********
nmod,1316,,,,-0.201295597960986,0.,0.
nmod,1317,,,,-0.201295597960986,0.,0.
nmod,1318,,,,-0.201295597960986,0.,0.
nmod,1319,,,,-0.201295597960986,0.,0.
nmod,1320,,,,-0.201295597960986,0.,0.
nmod,1321,,,,-0.201295597960986,0.,0.
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nmod,7623,,,,-0.201295597960986,0.,0.
/com,*********** Create Bearing Load ***********
et,2,154
eblock,10,,,30
(15i9)
     2959        2        2        2        0     2156     2166     1281     1273     7817     6172     6155     6156
     2960        2        2        2        0     2165     2168     2167     2147     7826     7829     7791     7790
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-1
esel,s,type,,2
keyop,2,7,1                ! Use original area so load is constant in large deformation
esel,all
fini
/com,****************************************************************************
/com,*************************    SOLUTION       ********************************
/com,****************************************************************************
/solu
antype,0                   ! static analysis
_thickRatio=  1     ! Ratio of thick parts in the model
eqsl,pcg,1e-8,,,,,,1
cntr,print,1               ! print out contact info and also make no initial contact an error
dmpoption,emat,no             ! Don't combine emat file for DANSYS
dmpoption,esav,no             ! Don't combine esav file for DANSYS
nldiag,cont,iter           ! print out contact info each equilibrium iteration
rescontrol,,none                 ! Do not keep any restart files
/com,****************************************************
/com,******************* SOLVE FOR LS 1 OF 1 ****************
esel,s,type,,2
sfe,all,5,pres,0,0.0,1.,0.,0.
local,11,0,0,0,0,-45.,0.,0.
csys,0
*set,_v1,0.707106781186547
*set,_v2,-0.707106781186547
*set,_v3,0.
*get,_necurr,elem,,count
_ecurr=0
_total=0
*do,_i,1,_necurr
  _ecurr = ELNEXT(_ecurr)
  _normx = NORMNX(NELEM(_ecurr,1),NELEM(_ecurr,2),NELEM(_ecurr,3))
  _normy = NORMNY(NELEM(_ecurr,1),NELEM(_ecurr,2),NELEM(_ecurr,3))
  _normz = NORMNZ(NELEM(_ecurr,1),NELEM(_ecurr,2),NELEM(_ecurr,3))
  _normmag = sqrt(_normx*_normx + _normy*_normy + _normz*_normz )
  _normx = _normx/_normmag
  _normy = _normy/_normmag
  _normz = _normz/_normmag
  _dot = _normx*_v1+_normy*_v2+_normz*_v3
  *if,_dot,gt,-.00001,then
    esel,u,elem,,_ecurr
  *else
    csys,11
    *get,_indd,elem,_ecurr,aproj,x
    csys,0
    _total=_total+_indd
  *endif
*enddo
*get,_necurr,elem,,count
*if,_necurr,eq,0,then
  *msg,error
  NO ELEMENTS ARE SELECTED TO APPLY BEARING LOAD TO. &
  IT IS LIKELY THAT THE BEARING LOAD IS IN THE WRONG DIRECTION
*endif
*set,_mag,141.42135623731
_mag=_mag/_total
sfe,all,5,pres,0,_mag,100.,-100.,0.
nsel,all
esel,all
nsub,1,1,1
time,1.
outres,erase
outres,all,none
outres,nsol,all,
outres,rsol,all
outres,eangl,all
outres,etmp,all
outres,veng,all
outres,strs,all,
outres,epel,all,
outres,eppl,all,
outres,cont,all,
! *********** WB SOLVE COMMAND ***********
! check interactive state
*get,ANSINTER_,active,,int
*if,ANSINTER_,ne,0,then
/eof
*endif
solve
/com *************** Write FE CONNECTORS *********
CEWRITE,file,ce,,INTE
/com,****************************************************
/com,*************** FINISHED SOLVE FOR LS 1 *************
*get,_PCGITER,active,,solu,cgiter
/post1
fini
